*Heading
** Job name: Abauqs-SCOR-2 Model name: Model-plane
** Generated by: Abaqus/CAE 6.14-4
*Preprint, echo=NO, model=NO, history=NO, contact=NO
**
** PARTS
**
*Part, name=Part-1
*Node
1,         -20.,-50.0,          25.
2,         -20.,-50.0,          26.
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*USER ELEMENT, TYPE=U1, NODES=8, COORDINATES=3
  1,2,3
*Element, type=U1
1, 4, 2, 1, 3, 56, 54, 53, 55
2, 6, 4, 3, 5, 58, 56, 55, 57
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*Element, Type=C3D8
1001, 4, 2, 1, 3, 56, 54, 53, 55
1002, 6, 4, 3, 5, 58, 56, 55, 57
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*Nset, nset=Set-1, generate
    1,  1092,     1
*Elset, elset=EALL, generate
   1,  500,    1
*Elset, elset=EALL_umat, generate
   1001,  1500,    1
*UEL PROPERTY, ELSET=EALL
1.,        2e+11,          0.3,           5.,           2.,          30.,           3.,          64.
           3.,          64.,           3.,          78.,           1.,           4.,          0.4,         0.25
          0.3,     0.328352,          0.5,     0.319295,     0.316228,  1.01246e+11, -5.13845e+10,  2.33192e+10
  1.08431e+10, -6.44191e+10,  4.40558e+10,   2.8044e+10, -2.05965e+10, -2.33192e+10,  4.55551e+09,  6.38263e+10
 -4.40558e+10,  3.98858e+11,  -1.9797e+09, -4.40558e+10,  4.40558e+10, -9.89852e+09, -2.33192e+10,  2.33192e+10
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    -0.240298,
*Solid Section, Elset=EALL_umat, material=UMAT_EALL_umat
,
*End Part
**
**
** ASSEMBLY
**
*Assembly, name=Assembly
**
*Instance, name=Part-1-1, part=Part-1
*End Instance
**
*Nset, nset=Set-1, instance=Part-1-1
    1,    2,   53,   54,  105,  106
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*Elset, elset=Set-1, instance=Part-1-1, generate
   1,  476,   25
*Nset, nset=Set-2, instance=Part-1-1, generate
 1041,  1092,     1
*Elset, elset=Set-2, instance=Part-1-1, generate
 476,  500,    1
*Nset, nset=Set-3, instance=Part-1-1
   51,   52,  103,  104,  155,  156
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*Elset, elset=Set-3, instance=Part-1-1, generate
  25,  500,   25
*Nset, nset=Set-5, instance=Part-1-1, generate
  1,  52,   1
*Elset, elset=Set-5, instance=Part-1-1, generate
  1,  25,   1
*Nset, nset=Set-Load, instance=Part-1-1, generate
    1,  1092,     1
*End Assembly
**
** MATERIALS
**
*Material, name=UMAT_EALL_umat
*User Material, constants=2
2e-11,  0.3
** ----------------------------------------------------------------
**
** STEP: Step-1
**
*Step, name=Step-1, nlgeom=NO
*Static
1., 1., 1e-05, 1.
**
** BOUNDARY CONDITIONS
**
** Name: BC-1 Type: 位移/转角
*Boundary
Set-1, 1, 1
Set-1, 2, 2
Set-1, 3, 3
Set-1, 4, 4
Set-1, 5, 5
Set-1, 6, 6
** Name: BC-2 Type: 位移/转角
*Boundary
Set-2, 1, 1
Set-2, 2, 2
Set-2, 3, 3
Set-2, 4, 4
Set-2, 5, 5
Set-2, 6, 6
** Name: BC-3 Type: 位移/转角
*Boundary
Set-3, 1, 1
Set-3, 2, 2
Set-3, 3, 3
Set-3, 4, 4
Set-3, 5, 5
Set-3, 6, 6
** Name: BC-4 Type: 位移/转角
*Boundary
Set-5, 1, 1
Set-5, 2, 2
Set-5, 3, 3
Set-5, 4, 4
Set-5, 5, 5
Set-5, 6, 6
**
** LOADS
**
** Name: Load-1   Type: Concentrated force
*Cload
Set-Load, 3, -1.
**
** OUTPUT REQUESTS
**
*Restart, write, frequency=0
**
** FIELD OUTPUT: F-Output-1
**
*Output, field, variable=PRESELECT
**
** HISTORY OUTPUT: H-Output-1
**
*Output, history, variable=PRESELECT
*End Step
